t := 6
a := 0.11*t
k := -7
b := 0.02*k
g := 0.02*k
d := 0.015*t
Q := [
    6.26 + a, 1.10 - b, 0.97 + g, 1.24 - d;
    1.10 - b, 4.16 - a, 1.30, 0.16;
    0.97 + g, 1.30, 5.44 + a, 2.10;
    1.24 - d, 0.16, 2.10, 6.10 - a
]
ll := eigenvals(Q)
ll = [2.48479; 4.1541; 6.00371; 9.3174]
l1 := eigenvec(Q, 2.48479)
l3 := eigenvec(Q, 6.00371)
l1 = [-0.231762; 0.789501; -0.43978; 0.359956]
l3 = [0.776406; 0.0911788; -0.523205; -0.339318]
l2 := eigenvec(Q, 4.1541)
l4 := eigenvec(Q, 9.3174)
l2 = [0.079804; -0.544534; -0.437619; 0.711058]
l4 = [0.580613; 0.268062; 0.584242; 0.499691]
f(x) := x^4 - 21.96*x^3 - (-167.976*x^2) - 529.518*x^1 - (-577.406*x^0)
C := f(x)*coeffs, x → coeffs*(-529.518*x + 167.976*x^2 + (-21.96*x^3) + x^4 + 577.406), x  # error: Эта переменная не определена.
