x := transpose([21, 22, 24, 26, 28])
y := transpose([1.87922841641, 1.8020491241, 2.34792622261, 3.38266310523, 4.02719632757])
s := cspline(x, y)
A(t) := interp(s, x, y, t)
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s = [0; 3; 2; 0.304195; 0.251108; 0.144933; -0.0975509; -0.340035]
